# Universitatea Tehnică Cluj-Napoca
# Facultatea de Inginerie Electrică
# Departamentul Maşini și Acționări Electrice
# Luțaș Răzvan
# Marian Constantin-Cosmin
# Grupa 1231
# Semigrupa 2
# Profesor/Îndrumător:
# As.dr.ing. Dan Cristian Popa
# Proiect
# Mașini electrice 2
# Mașina de inducție cu rotor în scurtcircuit
# Date cunoscute:
m := 3
U_N := 400  # [V]
f_1 := 50  # [Hz]
# Tip conexiune : Y (stea) | Clasă de izolație : F (max.120°C)
# Grupa de protecție: IP 44 | Serviciul: S1 (continuu) | Condiții de funcționare: normale
P_N := 5.5  # [kW]
n_N := 2920  # [rot/min]
i_p := 7
m_p := 2
m_m := 2.2
n_1 := 3000  # [rot/min]
# 1.1 Determinarea mărimilor de calcul ale mașinii
p := 60*f_1/n_1 = 1
# deci nr. de poli :
2*p = 2
η := 0.87
cosφ := 0.89
S_N := P_N*1000/(η*cosφ) = 7103.19  # [VA]
I_N := S_N/(sqrt(3)*U_N)
I_N := P_N*1000/(sqrt(3)*U_N*η*cosφ) = 10.2526  # [A]
# Tensiunea electromotoare si tensiunea de alimentare
U_1 := U_N/sqrt(3) = 230.94  # [V]  # -pentru conexiunea Y(stea)
k_E := 0.97
k_E == U_1/E_1  # deci
E_1 := k_E*U_1 = 224.012  # [V]
S_i := k_E*S_N = 6890.09  # [V] -putere aparentă interioare
# 1.2 Calculul dimensiunilor principale
k_ω := 0.92  # - factorul de înfășurare pentru armonica fundamentală
k_sd := 1.3  # - coeficientul de saturație magnetică parțial al dinților
k_B := 1.09  # - factorul de formă al t.e.m
α_i := 0.71  # - coeficientul de acoperire ideală a pasului polar
# Coeficient de utilizare
D_init == nthroot(2*p/(π*λ)*60*S_i/(n_1*C), 3)
S_i := m*E_1*I_N = 6890.09  # [V] -putere aparentă interioare (verificare)
C := 130  # [J/dm^3] - Coeficient de utilizare
λ := 0.4  # - raport de formă pentru mașină
# Deci diametrul D va fi :
D_init := nthroot(2*p/(π*λ)*60*S_i/(n_1*C), 3) = 1.19045  # [dm]
# Calculul diametrelor statorului
k_D := 1.68  # Din tabelul 1.1 în funcție de nr. de poli
D_ext_init := k_D*D_init = 1.99995  # [dm]
D_e := 21  # [cm] - diametru exterior al statorului (din fig 1.2)
# Se recalculează diametrul interior D :
D := D_e/k_D = 12.5
# [cm] =>
D := 12.5  # [cm]
τ := π*D/(2*p) = 19.635  # [cm] - pasul polar
# Calculul lungimilor mașinii asincrone
l_i == 60*S_i/(k_B*k_ω*α_1*π^2*D^2*n_1*A*B_δ)  # [m] - Lungimea ideală a mașinii asincrone
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B_δ := 0.59  # [T] - Inducția maximă în întrefier
# solicitări electromagnetice
A := 260  # [A/cm] - pătrunderea de curent
# Deci lungimea ideală a mașinii asincrone este :
l_i := 60*S_i/(k_B*k_ω*α_i*π^2*(10^-2*D)^2*n_1*10^2*A*B_δ) = 0.0818158  # [m] - lungimea ideală
λ := l_i*100/τ = 0.416685
# Geometria miezului
l_g := l_i = 0.0818158
l_Fe := l_i = 0.0818158
# 1.3 Determinarea lățimii de întrefier
δ := 3*(4 + 0.7*sqrt(D*100*l_g))*10^-2 = 0.33237  # [mm]
δ := 0.3  # [mm]
# 1.4 Solicitările electromagnetice ale mașinii asincrone
# Solicitările electrice
J_1 := 6.5  # [A/mm^2]  # - densitatea de curent în înfășurarea statorului
J_b := 4.5  # [A/mm^2]  # - densitatea de curent în înfășurarea rotorului
# Solicitările magnetice
# Valorile recomandate, ale inducțiilor în diferitele porțiuni ale circuitului magnetic sunt:
# a) în jugul statoric:
B_j1 := 1.45  # [T]
# b) în jugul rotoric:
B_j2 := 1.4  # [T]
# c) în dinții statorului:
# • crestături cu pereți paraleli:
# • în secțiunea minimă a dintelui:
B'_d1max := 2  # [T]
# • în secțiunea mediea dintelui:
B'_d1mad := 1.6  # [T]
# • dinți cu pereți paraleli:
B'_d1 := 1.5  # [T]
# c) în dinții rotorului:
# • crestături cu pereți paraleli:
# • în secțiunea minimă a dintelui:
B'_d2max := 1.8  # [T]
# • în secțiunea mediea dintelui:
B'_d2mad := 1.7  # [T]
# • dinți cu pereți paraleli:
B'_d2 := 1.6  # [T]
# 1.5 Infasurarile si crestaturile statorului
k_w1 := 0.92
τ = 19.635
q_1 := 5  # - numărul de crestături pe pol și fază
y_τ := m*q_1 = 15  # - pasul diametral între crestături
y_1 := y_τ*5/6 = 12.5  # - pasul principal
13
β_y := y_1/y_τ = 0.833333
# Numărul de crestături ale statorului
q_1 := 5  # - numărul de crestături pe pol și fază
Z_1 := 2*p*m*q_1 = 30  # - numărul de crestături statorice
t_1 := π*D/Z_1 = 1.309  # [cm]  # - pas dentar
0.05*τ = 0.981748
0.2*τ = 3.92699
# Elementele înfășurării statorului
ϕ := α_i*τ*l_i*B_δ/100 = 0.00672942
[Wb]  # - flux
w_1 := k_E*U_1/(4*k_B*f_1*k_w1*ϕ) = 165.977  # - numărul de spire pe fază
a_1 := 1  # - numărul de căi în paralel pe o fază
n_c1 := 2*m*a_1*w_1/Z_1 = 33.1955  # - numărul de conductoare efective
# Deci =>
n_c1 := 34
w_1 := Z_1*n_c1/(2*m*a_1) = 170  # - numărul real de spire pe fază
N_1 := Z_1*n_c1 = 1020  # - numărul total de conductoare ale înfășurării
I := I_N/a_1 = 10.2526
[A]  # -curentul pe o cale de curent
A := N_1*I/(π*D) = 266.301
[A/cm]  # - verificarea păturii de curent
Φ := k_E*U_1/(4*k_B*f_1*w_1*k_w1) = 0.00657019
[Wb]  # - verificarea fluxului
B_δ1 := Φ/(α_i*τ*10^-2*l_i) = 0.576039
[T]  # - verificarea valoarii maximă a inducției în întrefier
# Tipul înfășurării și dimensiunile crestăturii
# A) Secțiunea conductorului
J_1 = 6.5
[A/mm^2]
S_Cu1 := I_N/(a_1*J_1) = 1.57732
[mm^2]  # - secțiunea conductorului efectiv
# • Alegem varianta I din tabelul 1.3.
# B) Dimensiunile conductorului și ale crestăturii
k_Fe := 0.95  # - coeficient de împachetare
B'_dadm := 1.7
[T]  # - amplitudinea inducției admisibilă în dintele statoric cu pereți paraleli
b_d1 := t_1*l_i*B_δ*10/(k_Fe*l_Fe*B'_dadm) = 4.78209  # [mm]  # - lățimea constantă a dintelui statoric
n_f := 1  # - numărul total de conductoare elementare din crestătură
n_tot := n_c1*n_f = 34  # - numărul total de conductoare elementare în crestătură
k_u := 0.75  # - coeficient de umplere
g_iz := 0.4  # [mm]  # - grosimea izolației
d_c := sqrt(4*S_Cu1/(π*n_f)) = 1.41715  # [mm]
d_c := 1.4  # [mm]  # - diametrul conductorului izolat al înfășurării statorice
S_cond := π*d_c^2/4 = 1.53938  # [mm^2]  # - secțiunea conductorului elementar
S_Cu1 := n_f*S_cond = 1.53938  # [mm^2]  # - secțiunea conductorului
d_iz := 1.479  # [mm]  # - diametrul izolat al conductorului
S'_cr := n_tot*d_iz^2/k_u = 99.164  # [mm^2]  # - secțiunea netă a crestăturii
a_s := d_iz + 1.5 = 2.979  # [mm]  # - deschiderea crestăturii
g_iz := 0.4  # [mm]
h_pană := 3  # [mm]
h_istm1 := 1  # [mm]
S_cr1util := S'_cr = 99.164  # [mm^2]
b_istm1 := d_iz + 2*g_iz = 2.279  # [mm]
# - lățimea crestăturii statorice la vârful părții trapezoidale
b_cr1v := π/Z_1*(D*10 + 2*h_istm1 + 2*h_pană + 4*g_iz) - b_d1 = 9.31318
[mm]
# - înălțimea (radială) părții utile a crestăturii
h_utilcr1 := (sqrt((b_cr1v - 2*g_iz)^2 + 4*S_cr1util*tan(π/Z_1)) - (b_cr1v - 2*g_iz))/(2*tan(π/Z_1)) = 10.3307
[mm]
# - înălțimea (radială) dintelui statoric
h_d1 := h_utilcr1 + h_istm1 + h_pană + 4*g_iz = 15.9307
[mm]
# - lățimea crestăturii statorice la baza părții trapezoidale
b_cr1b := π/Z_1*(D*10 + 2*h_d1) - b_d1 = 11.6444
[mm]
# - lățimea dintelui statoric în zona vârfului crestăturii trapezoidale
b_d1v := π/Z_1*(D*10 + 2*h_istm1 + 2*h_pană) - b_cr1v = 4.61454
[mm]
# - lățimea dintelui statoric în zona bazei crestăturii trapezoidale
b_d1b := π/Z_1*(D*10 + 2*h_d1) - b_cr1b = 4.78209
[mm]
# - lățimea dintelui statoric în zona medie a înălțimii crestăturii trapezoidale
b_d1m := (b_d1b + b_d1v)/2 = 4.69832
[mm]
# - aria secțiunii nete a crestăturii statorice
S_cr1util := ((b_cr1v - 2*g_iz) + (b_cr1b - 2*g_iz))/2*(h_d1 - h_istm1 - h_pană - 2*g_iz) = 107.731
[mm^2]
h'_j1 := (D_e*10^-2 - D*10^-2)/2 - h_d1*10^-3 = 0.0265693  # [m]
B_j1 := Φ/(2*k_Fe*l_i*h'_j1) = 1.59077  # [T]
# Valorile rapoartelor si dimensiunilor crescăturii
β_a1 := b_d1*0.1/t_1 = 0.365325
β_a2 := b_d1*0.1/τ = 0.024355
h_d1 = 15.9307
β_a1 := h_d1/b_d1 = 3.33132
# 1.6 Infasurarile si crestaturile rotorului
Z_2 := 23
m_2 := Z_2 = 23
α := p*2*π/Z_2 = 0.273182  # - Unghiul de defazaj între curenți
k_i := sin(π*p/Z_1)/(π*p/Z_1) = 0.998173  # - Factor de înfășurare
# • Dimensionarea infasurarii, crestaturilor si jugului magnetic ale rotorului
# • Dimensionarea infasurarii (tip colivie simpla) in scurtcircuit si a crestaturilor rotorului
# • T.E.M indusa intr-o bara (inclinata) a coliviei motorului
b_i2 := t_1 = 1.309
k_E = 0.97
k_Fe = 0.95
δ = 0.3  # [mm]
B_d2 := 1.7  # [T]
k_ω = 0.92
k_12 := D/(p*b_i2)*sin(p*b_i2/D) = 0.998173
U_e2 := k_E*U_1/(2*k_ω*w_1) = 0.716151  # [V]
U_20 := k_E*U_1*k_i/(2*k_ω*w_1) = 0.714842  # [V]
b_istm2 := 1.2  # [mm]  # - Lățimea istmului crestăturii rotorului
h_istm2 := 1  # [mm]  # - Înălțimea istmului crestăturii rotorulu
b_cr2v := π/Z_2*((1 - B_δ/(k_Fe*B_d2))*D*10 - 2*δ - 2*h_istm2) = 10.4812  # [mm]
# - Lățimea barei coliviei rotorice la vârful crestăturii trapezoidale
# Intensitatea curentului electric din bara (inclinata) a coliviei rotorului
k_rot := 1.1
I_b := k_rot*P_N*1000/(Z_2*U_e2) = 367.302
J_2b := 5  # [A/mm]
# Aria secțiunii arei (înclinate) a coliviei rotorului
S_bara := I_b/J_2b = 73.4604  # [mm]
# Lățimea barei coliviei rotorice la vârful crestăturii trapezoidale
B_d2 = 1.7  # [T]
b_cr2v := π/Z_2*((1 - B_δ/(k_Fe*B_d2))*D*10 - 2*δ - 2*h_istm2) = 10.4812  # [mm]
# Lățimea barei coliviei rotorice la baza crestăturii trapezoidale și înălțimea crestăturii (dintelui) rotorului
h_d2 := Z_2/(2*π)*(b_cr2v - sqrt(b_cr2v^2 - 4*π/Z_2*S_bara)) + h_istm2 = 8.80204  # [mm]
h_cr2 := h_d2
b_cr2b := b_cr2v - 2*π/Z_2*(h_cr2 - h_istm2) = 8.34985  # [mm]
# Latimea dintelui rotoric in zona varfului barei coliviei
b_d2v := π/Z_2*(D*10 - 2*δ - 2*h_istm2) - b_cr2v = 6.23751  # [mm]
# Latimea dintelui rotoric in zona bazei crestaturii trapezoidale
b_d2b := π/Z_2*(D*10 - 2*δ - 2*h_d2) - b_cr2b = 6.23751  # [mm]
# Latimea dintelui statoric in zona medie a inaltimii crestaturii trapezoidale
b_d2m := (b_d2b + b_d2v)/2 = 6.23751  # [mm]
# Aria sectiunii trapezoidale a barei coliviei rotorice
S_b := (b_cr2v + b_cr2b)*(h_cr2 - h_istm2)/2 = 73.4604  # [mm^2]
I_i := I_b/(2*sin(π*p/Z_2)) = 1348.72
J_2i := 0.7*J_b = 3.15
[A/mm]
S_2i := I_i/J_2i = 428.166
# Diametrul exterior al rotorlui
D_r := D - 2*δ*1/10 = 12.44  # [cm]
t_2 := π*D_r/Z_2 = 1.69919  # [cm]
l_fe := l_i
# Verificari necesare
h'_j2 := ϕ/(2*k_Fe*l_i*B_j2) = 0.0309214  # [m]  # - Înălțimea preliminară a jugului rotoric
D_ir := D_r - 2*(h_cr2/10 + h'_j2*100) = 4.49532  # [cm]  # - Diametrul interior al rotorului
D_ir := 4.5  # [cm]
d_cap_ax := 38  # [mm]
d_ax := 1.1*d_cap_ax = 41.8  # [mm]
# 1.7 Calculul curentului de magnetizare
H := 50  # [A/cm]
l_i = 0.0818158  # [m]
U_mm := H*l_i*10^2 = 409.079  # [A]  # - Tensiunea magnetomotoare
# A) Tensiunea electromotoare a întrefierului
μ_0 := 4*π*10^-7 = 1.25664e-6  # [H/m]
γ_1 := (b_istm1/δ)^2/(5 + b_istm1/δ) = 4.58132
γ_2 := (b_istm2/δ)^2/(5 + b_istm2/δ) = 1.77778
k_C1 := t_1/(t_1 - γ_1*δ*10^-1) = 1.11731
k_C2 := t_2*10/(t_2*10 - γ_2*δ) = 1.0324
# • Deci coeficientul total este:
k_C := k_C1*k_C2 = 1.15352
δ' := k_C*δ = 0.346056
U_mδ := 2*B_δ/μ_0*δ'*10^-3 = 324.951  # - Tensiunea magnetomotoare a întrefierului
# B) Tensiunea electromotoare a dinților statorului, respectiv ai rotorului
B_d1 := B'_d1 = 1.5
B_d2 = 1.7
H_d1 := 12  # [A/cm]
H_d2 := 50  # [A/cm]
U_md1 := 2*H_d1*h_d1*10^-1 = 38.2336  # [A]
U_md2 := 2*H_d2*h_d2*10^-1 = 88.0204  # [A]
# • Verificarea coeficientului partial de saturație magnetică
k_sd = 1.3  # - Valoarea inainte de verificare
k_sd := (U_mδ + U_md1 + U_md2)/U_mδ = 1.38853  # - Nu depaseste 25% din valoarea de dinaintea verificării
# C) Tensiunea magnetomotoarea a jugului statoric, respectiv rotoric
B_j1 := 1.45
B_j2 := 1.4
H_j1 := 9  # [A/cm]
H_j2 := 7  # [A/cm]
ζ_1 := 0.375
ζ_2 := 0.4
L_j1 := π*(D_e - h'_j1*100)/(2*p) = 28.8132  # [cm]  # - Lungimea media a liniei de câmp în jurul statorului
L_j2 := π*(D_ir - h'_j2*100)/(2*p) = 2.21147  # [cm]  # - Lungimea media a liniei de câmp în jurul rotorului
U_mj1 := ζ_1*H_j1*L_j1 = 97.2446  # [A]
U_mj2 := ζ_2*H_j2*L_j2 = 6.19211  # [A]
# Tensiunea magnetomotoare a circuitului magnetic pe o pereche de poli
U_mcirc := U_mδ + U_md1 + U_md2 + U_mj1 + U_mj2 = 554.642  # [A]
k_s := U_mcirc/U_mδ = 1.70685  # - Coeficient total de saturatie magnetica
# Curentul de funcționare în gol a motorului de inducție
I_μ := p*U_mcirc/(0.9*m*w_1*k_ω) = 1.31345
I_μprocent := I_μ/I_N*100 = 12.8109  # %
# 1.8 Parametrii înfășurărilor mașinii asincrone
# Tipuri de bobine și dimensiunile lor
t_1med := π*(D*10 + h_utilcr1)/(Z_1*10) = 1.41718
[mm]  # - pas dentar mediu
D = 12.5
R_med := y_1*t_1med/2 = 8.85737
[mm]  # - raza medie
A := 0
[cm]  # - valoarea cotei A
l_fmed := π*R_med + A = 27.8263
[cm]  # - lungimea media frontală
l_wmed := l_g + l_fmed = 27.9081
[cm]  # - lungimea mediea a unei jumătăți de spire
# Determinarea rezistențelor înfășurărilor
# A. Rezistența pe fază a înfășurării statorului
k_r := 1
ρ_20 := 1/56
[Ω*mm^2/m]
ρ_115 := 1.38*ρ_20 = 0.0246429
[Ω*mm^2/m]
L_1 := 2*w_1*l_wmed*10^-2 = 94.8874
[m]
R_1 := k_r*ρ_115*L_1/(S_Cu1*a_1) = 1.51899  # [Ω]  # - rezistența pe înfășurarea statorică
# B. Rezistența pe fază a înfășurării rotorului în scurtcircuit
m_2 := Z_2 = 23
I_2 := I_b = 367.302
[A]
ρ_20 := 1/32 = 0.03125
[Ω*mm^2/m]
ρ_115 := 1.35*ρ_20 = 0.0421875
[Ω*mm^2/m]
ρ_b := ρ_115 = 0.0421875
[Ω*mm^2/m]
ρ_i := ρ_115 = 0.0421875
[Ω*mm^2/m]
D_r = 12.44
[cm]
D_isc := D_r - 2*h_d2*10^-1 = 10.6796  # - diametrul mediu al inelului de scurtcircuit al coliviei rotorice
L_i := π*D_isc*10^-2/Z_2 = 0.0145874
[m]
L_b := l_g = 0.0818158
[m]
R_b := ρ_b*L_b/S_b = 4.69859e-5  # [Ω]  # - rezistența barei
R_i := ρ_i*L_i/S_i = 8.93172e-8  # [Ω]  # - rezistența inelului de scurtcircuitare
R_2 := R_b + R_i/(2*sin(π*p/Z_2)^2) = 4.93945e-5  # [Ω]  # - rezistența pe fază a rotorului în scurtcircuit
# Determinarea reactanțelor înfășurărilor
b_cr1v = 9.31318
[mm]
b_istm1 = 2.279
[mm]
β_y = 0.833333
h_utilcr1 = 10.3307
[mm]
h_istm1 = 1
[mm]
λ_cr2 := (h_cr2 - h_istm2)/(3*b_cr2v) = 0.248128
k'_β := (1 + 3*β_y)/4 = 0.875
k_β := 1/4 + 3/4*k'_β = 0.90625
λ_c1 := h_utilcr1/(3*b_cr1v)*k_β + (0.785 - b_istm1/(2*b_cr1v) + 2*g_iz/b_cr1v + h_istm1/b_istm1)*k'_β = 1.37401
# λ_c | - permeanță specifică în crestătură
h_1 := h_d1 - h_pană - h_istm1 - 3*g_iz = 10.7307
[mm]
ρ_d1 := 0.97
k_01 := 1 - 0.033*b_istm1^2/(δ*t_1) = 0.563542
σ_d1 := 0.0052
λ_d1 := 0.9*t_1*10*(q_1*k_w1)^2*ρ_d1*σ_d1/(k_C*δ) = 3.6335
λ_f1 := 0.34*q_1/(l_i*100)*(l_fmed - 0.64*β_y*τ) = 3.60594
λ_1 := λ_f1 + λ_d1 + λ_c1 = 8.61345
X_σ1 := 0.158*f_1/100*(w_1/100)^2*l_i*100/(p*q_1)*λ_1 = 3.21788  # [Ω]  # - reactanța de scăpări pe faza statorului
I_μ = 1.31345
X_m := (U_1 - I_μ*X_σ1)/I_μ = 172.61  # [Ω]  # - reactanța utilă a circuitului de magazinare
# Determinarea parametrilor electromagnetici
# - factorul de raportare a înfășurării rotorice în scurtcitcuit la rotor
w_1 = 170  # - spire
k_i2 := D/(p*b_i2)*sin(p*b_i2/D) = 0.998173
K := 12*(k_w1*w_1)^2/(Z_2*k_i2^2) = 12809
# - rezistența electrica a materialului colivieri rotorice:
ρ_2 := 1/19
[Ω*mm^2/m]
# - înălțimea inelului de scurtcircuitare a coliviei rotorice
h_d2 := h_d2*10 = 88.0204
[mm]
h_isc := h_d2 + 7 = 95.0204
h_isc = 95.0204
[mm]
# - lățimea inelului de scurtcircuitare a coliviei rotorice
b_isc := S_2i/h_isc = 4.50604
[mm]
# - valoarea finală a arie secțiunii inelului de scurtcircuitare a coliviei rotorice
S_i := b_isc*h_isc = 428.166
[mm^2]
# - diametrul mediu al inelului de scurtcircuitare al coliviei rotorice
D_i.sc := D*10 - 2*δ - h_isc = 29.3796
[mm]
# Determinarea reactanțelor înfășurării statorice:
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# - lățimea crestăturii statorice în planul de separație dintre cele două straturi
b_cr1m := sqrt(1/2*(b_cr1v^2 + b_cr1b^2)) = 10.5434
# - înălțimea stratului superior(dinspre vârful crestăturii)
h_cr1 := h_d1 = 15.9307
h_cr1v := (b_cr1m - b_cr1v)/(b_cr1b - b_cr1v)*(h_cr1 - h_istm1 - h_pană - 4*g_iz) = 5.45174
# - înălțimea stratului superior (dinspre baza crestăturii)
h_cr1b := (b_cr1b - b_cr1m)/(b_cr1b - b_cr1v)*(h_cr1 - h_istm1 - h_pană - 4*g_iz) = 4.87894
K_Cu := 6*p*y_1/Z_1 + 1.67 = 4.17
K_h := 6*p*y_1/Z_1 = 2.5
# - permeanța geometrică specifică a scăpărilor în crestătură
λ_cr1 := 1/4*(2/3*h_cr1b/(b_cr1b + b_cr1m) + g_iz/b_cr1m + K_Cu*h_cr1v/(b_cr1m + b_cr1v)) + 1/4*K_h*((h_pană + 2*g_iz)/b_cr1v + 2*h_pană/(b_cr1v + b_istm1) + h_istm1/b_istm1)
λ_cr1 = 1.18511
# - permeanța geometrică specifică a scăpărilor diferențiale:
λ_d1 := t_1*10/11.9*k_w1^2/(k_C*δ) = 2.69043  # [cm]
# - permeanța geometrică specifică a scăpărilor în părțile frontale:
λ_f1 := 0.34*q_1/(l_i*100)*(l_fmed - 0.64*y_1/y_τ*τ) = 3.60594  # [cm]
# - reactanței de scăpări pentru înfășurarea statorului mașinii de inducție
X_σ1 := 0.158*f_1*w_1^2*l_i*100/(p*q_1)*10^-6*(λ_cr1*λ_d1*λ_f1) = 4.29526
[Ω]
# Determinarea reactanțelor coliviei rotorice:
# - permeanța geometrică specifică a scăpărilor în crestătură:
b_cr2 := sqrt(1/2*(b_cr2v^2 + b_cr2b^2)) = 9.47565  # - lățimea medie a crestăturii rotorice
λ_cr2 := ((h_cr2 - h_istm2)/(3*b_cr2) + h_istm2/b_istm2) = 1.10779
# - permeanța geometrică specifică a scăpărilor diferențiale:
λ_d2 := 10/119*t_2*10/(k_C*δ) = 4.12619  # [cm]
# - permeanța geometrică specifică a scăpărilor în părțile frontale:
λ_f2 := 2.3*D_i.sc*10^-2/(4*Z_2*l_i*sin(π*p/Z_2)^2)*log(4.7*D_i.sc*10/(h_isc + 2*b_isc)) = 5.43722
h_isc = 95.0204
D_i.sc = 29.3796
# - expresia reactanței de scăpări pentru rotorul în scurtcircuit este:
X_σ2 := 7.9*f_1*l_i*10^-6*(λ_cr1*λ_d1*λ_f1) = 0.000371563
[Ω]
# - expresia reactanței de scăpări pentru rotorul în scurtcircuit este:
X_m := (U_1 - I_μ*X_σ1)/I_μ = 171.532
[Ω]
# - factorul de raportare a înfășurării în scurtcircuit la stator
K := 12*(w_1*k_w1)^2/Z_2 = 12762.2
# - rezistența și reactanța de scăpări ale rotorului raportate la stator sunt:
R'_2 := K*R_2 = 0.630385
[Ω]
X'_σ2 := K*X_σ2 = 4.74197
[Ω]
# Calculul pierderilor și randamentului mașinii asincrone
# • Pierderi principale în fier:
# - pierderi principale în fier în jurul statorului:
D_ij1 := D + 2*h_d1/10 = 15.6861  # [cm]
D_ej1 := D_e = 21  # [cm]
Υ_Fe := 7.8
[kg/dm^3]
ρ_10 := 2.6/50 = 0.052
l_Fe = 0.0818158
G_j := Υ_Fe*π/4*(D_ej1^2 - D_ij1^2)*k_Fe*l_Fe*10^-1 = 9.28235  # [kg]
k_j := 1.3
p_j1 := 2.4*(f_1/50)^1.3*B_j1^2 = 5.046
[W/kg]
P_j1 := k_j*p_j1*G_j = 60.8904
[W]
# - pierderi principale în fier în dinții statorului:
k_D := 1.8
p_d1 := 2.4*(f_1/50)^1.3*B'_d1^2 = 5.4
[W/kg]
G_d1 := h_d1*b_d1m*l_Fe*k_Fe*Z_1*Υ_Fe*10^-3 = 1.3613
[kg]
# deci:
P_d1 := k_D*p_d1*G_d1 = 13.2318
[W]
# - pierderi principale totale în fier
P_Fepr := P_j1 + P_d1 = 74.1222
[W]
# • pierderi suplimenatare în fier la funcționarea în gol
# - pierderi de suprafață ale statorului
k_0 := 1.6
b_istm2/δ = 4
# deci:
β_01 := 0.25
B_01 := β_01*k_C*B_δ = 0.170144
[T]
p_supr1 := (0.5*k_0*(Z_2*n_1/10^4)^1.5*(B_01*t_2)^2)*10 = 12.1194
[W/m^2]
P_supr1 := (2*p*((t_1*10 - a_s)/(t_1*10))*τ*l_Fe*k_Fe*p_supr1)*10 = 285.731
[W]
# - pierderi de pulsație în dinții statorului
b_istm1/δ = 7.59667
k_0 := 1.6
k'_0 := 0.1
β_02 := 0.36
B_02 := β_02*k_C*B_δ = 0.245008
[T]
# deci:
p_supr2 := 0.5*k_0*(Z_2*n_1/10^4)^1.5*(B_02*t_1)^2 = 1.49142
[W/m^2]
P_supr2 := 2*p*((t_2*10 - a_s)/(t_2*10))*τ*l_Fe*k_Fe*p_supr2*10 = 37.5411
[W]
B_puls1 := γ_2*δ*10^-1/(2*t_1)*B_d1 = 0.0305577
[T]
P_puls1 := k'_0*(Z_2*n_1/10^4*10*B_puls1)^2*G_d1 = 0.605194
[W]
# - pierderi de pulsație în dinții rotorici
B_puls2 := γ_1*δ*10^-1/(2*t_2)*B_d2 = 0.0687525
[T]
G_d2 := h_d2*b_d2m*l_Fe*Z_2*Υ_Fe*10^-3 = 8.05851
[kg]
P_puls2 := 0.1*(Z_1*n_1/10^4*B_puls2)*G_d2 = 0.498638
[W]
P_Fe := P_Fepr + P_supr1 + P_puls1 + P_supr2 + P_puls2 = 398.498
[W]
# - pierderi în înfășurarea statorului
P_el1 := m*R_1*I_N^2 = 479.006
[W]
# - pierderi în înfășurarea rotorului
P_el2 := m_2*R_2*I_b^2 = 153.269
[W]
# - pierderi electrice principale totale
P_el := P_el1 + P_el2 = 632.274
[W]
# - pierderi mecanice prin frecare și ventilație
P_mec := 1.2*2*p*(τ/10)^3*11 = 199.845
[W]
# - pierderi suplimentare în fier
P_SFe := 0.0005*P_N*10^3 = 2.75
[W]
# - pierderi totale
P_tot := P_Fe + P_el + P_mec + P_SFe = 1233.37
[W]
P_totkW := P_tot*10^-3 = 1.23337
[kW]
# • Randamentul mașinii la funcționarea nominală
P_N = 5.5
[kW]
η_N := P_N/(P_N + P_totkW) = 0.816828  # [%]
# 1.9 Calculul caracteristicilor mașinii asincrone cu parametrii constanți
# - componenta activă a curentului de funcționare în gol:
P_el0 := m*R_1*I_μ^2 = 7.8614
[W]
I_0a := (P_Fe + P_mec + P_el0)/(m*U_1) = 0.874981
# - curentul de funcționare în gol
I_0 := sqrt(I_0a^2 + I_μ^2) = 1.57821
[A]
# - factor de putere la funcționarea în gol
cos_φ0 := I_0a/I_0 = 0.554415
# - Curentul absorbit
c_1 := 1 + X_σ1/X_m = 1.02504
R_k := c_1*R_1 + c_1^2*R'_2 = 2.21937
[Ω]
X_k := c_1*X_σ1 + c_1^2*X'_σ2 = 9.38525
[Ω]
I''_2k := U_N/sqrt(R_k^2 + X_k^2) = 41.4762
[A]
I'_2k := c_1*I''_2k = 42.5148
[A]
cos_φ2k := R_k/sqrt(R_k^2 + X_k^2) = 0.230128
I'_2ka := I'_2k*cos_φ2k = 9.78383
[A]
sin_φ2k := X_k/sqrt(R_k^2 + X_k^2) = 0.97316
I'_2kr := I'_2k*sin_φ2k = 41.3737
[A]
I_1k := sqrt((I_0a + I'_2ka)^2 + (I_μ + I'_2kr)^2) = 43.9977
[A]
# - alunecarea nominală
I'_2N := Z_2/(2*m*w_1*k_w1)*I_b = 9.0025
[A]
s := (n_1 - n_N)/n_1 = 0.0266667
s_N := R'_2*I'_2N/(k_E*U_1) = 0.0253337
# - factor de putere nominală
I'_2aN := U_1*(R_1 + c_1*R'_2/s_N)/((R_1 + c_1*R'_2/s_N)^2 + (X_σ1 + c_1*X'_σ2)^2) = 7.66546
[A]
I'_2rN := U_1*(X_σ1 + c_1*X'_σ2)/((R_1 + c_1*R'_2/s_N)^2 + (X_σ1 + c_1*X'_σ2)^2) = 2.597
[A]
I_1N := sqrt((I_0a + I'_2aN)^2 + (I_μ + I'_2rN)^2) = 9.39312
[A]
cos_φN := (I_0a + I'_2aN)/I_1N = 0.909223
# - Cuplu nominal
M_N := 60*P_N*10^3/(2*π*n_N) = 17.9867
[Nm]
c_1 := 1 + X_σ1/X_m = 1.02504
M := m*p*U_1^2*R'_2/s/(2*π*f_1*((R_1 + c_1*R'_2/s)^2 + (X_σ1 + c_1 + X'_σ2)^2)) = 15.7516
[Nm]
